*HEADING
Voxel grid to C3D8R (SI units: m, Pa, kg)
*NODE
1, 0, -0.0198437497, -0.0396874994
2, 0.00396875013, -0.0198437497, -0.0396874994
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
*ELEMENT, TYPE=C3D8R, ELSET=ALL
1, 1,2,132,131,1561,1562,1692,1691
2, 1561,1562,1692,1691,3121,3122,3252,3251
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
*ELSET, ELSET=PART_003_R247G182B210A255
1,12,23,34,45,56
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
*ELSET, ELSET=PART_000_R31G119B180A255
2,3,4,5,6,7
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
*ELSET, ELSET=PART_001_R158G218B229A255
11,13,14,15,16,17
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
*ELSET, ELSET=PART_002_R214G39B40A255
55,66,77,88,99,110
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
*MATERIAL, NAME=Mat1
*ELASTIC
7.0e10, 0.33
*DENSITY
2700.

*SOLID SECTION, ELSET=ALL, MATERIAL=Mat1

*NSET, NSET=XMIN
1,131,261,391,521,651
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
*SURFACE, NAME=FACE_XMAX, TYPE=ELEMENT
15458, S5
15459, S5
15460, S5
15461, S5
15462, S5
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15534, S5

*STEP
*STATIC
*BOUNDARY
XMIN, 1, 3

*DLOAD
FACE_XMAX, P, -1.0e6

*NODE PRINT, NSET=ALL
U
*EL PRINT, ELSET=ALL
S, E
*END STEP
